// SBML level 2 version 3

model New_Model()

  // Compartments:
  compartment cell = 2e-13;

  // Species:
  species H in cell = 1.660539;
  species H2 in cell = 0;
  species O in cell = 0.8302695;
  species H2O in cell = 0;
  species _1MBN in cell = 0;
  species Test in cell = 0.08302695;

  // Reactions:
  reaction9070: H2 + O => H2O; cell*reaction9070_k1*H2*O;
    reaction9070_k1 = 0.01;
  reaction9072: H2O => H2 + O; cell*reaction9072_k1*H2O;
    reaction9072_k1 = 0.05;
  reaction9074: 2 H => H2; cell*reaction9074_k1*H^2;
    reaction9074_k1 = 1;

  // Unit definitions:
  unit volume = 1e-9 litre;
  unit substance = 1e-9 mole;
end
